@Author Mehran Ghasabeh, Thomas Nagel;
@Date   19/02/2019;
@Description{
};

@Real 'Pi' 3.14159265359;
@Real 'em'  '1e-3 * Pi';
@Real 'tmax' 1.;
@Real 'sigp' '-1e2';
@Real 'Emoduli' '150e3';
@Real 'nuRatio' '0.25';
@Real 'PCohesion' '0.';
@Real 'PFrictionAngle' '22.';
@Real 'PDilatancyAngle' '0.';

@MaximumNumberOfSubSteps 1;
@Behaviour<generic> 'src/libBehaviour.so' 'WeakPlaneModel_nonIter';

@ImposedStrain 'EXY' {0 : 0, 0.25 : 'em', 0.5 : '-em', 0.75 : 'em', 'tmax' : '-em'};
// @ImposedStrain<function> 'EXY' 'em * sin(2.* Pi * t)';
@ImposedStress 'SXX' 'sigp';

@ExternalStateVariable "Temperature" 293.15;

@MaterialProperty<constant> 'Em' 'Emoduli';
@MaterialProperty<constant> 'nu' 'nuRatio';
@MaterialProperty<constant> 'PlaneCohesion' 'PCohesion';
@MaterialProperty<constant> 'PlaneFrictionAngle' 'PFrictionAngle';
@MaterialProperty<constant> 'PlaneDilatancyAngle' 'PDilatancyAngle';

@Times{0, 'tmax' in 200};
